// SBML level 3 version 2

model biocrnpyler_617483()
  // model units - substance: mole, time: second, volume: litre, area: square_metre, length: metre, extent: mole

  // Compartments:
  compartment default_atp_usebiocrnpyler_617483 = 1e-6;

  // Species:
  species metabolite_adp_atp_usebiocrnpyler_617483 in default_atp_usebiocrnpyler_617483 = 0;
  species metabolite_atp_atp_usebiocrnpyler_617483 in default_atp_usebiocrnpyler_617483 = 10/default_atp_usebiocrnpyler_617483;
  species metabolite_pi_atp_usebiocrnpyler_617483 in default_atp_usebiocrnpyler_617483 = 0;

  // Reactions:
  r0_atp_usebiocrnpyler_617483: metabolite_atp_atp_usebiocrnpyler_617483 => metabolite_adp_atp_usebiocrnpyler_617483 + metabolite_pi_atp_usebiocrnpyler_617483; k*metabolite_atp_atp_usebiocrnpyler_617483;
    k = 5;

  // Unit definitions:
  unit square_metre = metre^2;
end
